// SBML level 2 version 4

model lv_ude()
  // PEtab implementation of the simple model

  // Compartments:
  compartment default = 1;

  // Species:
  substanceOnly species prey in default = 0.44249296*default;
  substanceOnly species predator in default = 4.6280594*default;

  // Parameters:
  alpha = 1.3;
  beta = 0.9;
  gamma = 0.8;
  delta = 1.8;

  // Reactions:
  v1: => prey; alpha*prey;
  v2: predator => ; delta*predator;
  v3: prey => ; beta*prey*predator;  // modifiers: predator
  v4: => predator; gamma*predator*prey;  // modifiers: prey

  // Unit definitions:
  unit time = 60 second;
end
